<?xml version="1.0"?>
<Node name="Root" gravity="0 -9.8 0" time="0" animate="0" bbox="-2 -20 -4 42 12 4" dt="0.001">

    <Node name="Plugins">
        <RequiredPlugin name="SofaDiff" pluginName="SofaDiff"/>
        <RequiredPlugin name="Sofa.Component.Visual"/> <!-- Needed to use components [VisualStyle] -->
        <RequiredPlugin name="Sofa.Component.LinearSolver.Iterative"/> <!-- Needed to use components [CGLinearSolver] -->
        <RequiredPlugin name="Sofa.Component.LinearSolver.Direct"/> <!-- Needed to use components [SparseLDLSolver] -->
        <RequiredPlugin name="Sofa.Component.ODESolver.Backward"/> <!-- Needed to use components [NewtonRaphsonSolver, StaticSolver] -->
        <RequiredPlugin name="Sofa.Component.StateContainer"/> <!-- Needed to use components [MechanicalObject] -->
        <RequiredPlugin name="Sofa.Component.Mass"/> <!-- Needed to use components [UniformMass] -->
        <RequiredPlugin name="Sofa.Component.MechanicalLoad"/> <!-- Needed to use components [ConstantForceField] -->
        <RequiredPlugin name="Sofa.Component.Constraint.Projective"/> <!-- Needed to use components [FixedProjectiveConstraint] -->
        <RequiredPlugin name="Sofa.Component.SolidMechanics.Spring"/> <!-- Needed to use components [SpringForceField] -->
        <RequiredPlugin name="Sofa.Component.Topology.Container.Grid"/> <!-- Needed to use components [RegularGridTopology] -->
        <RequiredPlugin name="Sofa.Component.Engine.Select"/> <!-- Needed to use components [BoxROI] -->
        <RequiredPlugin name="Sofa.Component.SolidMechanics.FEM.Elastic"/> <!-- Needed to use components [HexahedronFEMForceField] -->
        <RequiredPlugin name="Sofa.Component.Mapping.Linear"/> <!-- Needed to use components [BarycentricMapping] -->
        <RequiredPlugin name="Sofa.Component.Mapping.NonLinear"/> <!-- Needed to use components [DistanceFromTargetMapping] -->
    </Node>

    <DefaultAnimationLoop/>
    <VisualStyle displayFlags="showBehavior showBehaviorModels showForceFields showMappings"/>

    <Node name="Parameters">
        <TrainableParameterVector name="springLength" value="20"/>
        <TrainableParameterVector name="springStiffness" value="100000"/>
    </Node>

    <Node name="Physics">
        <NewtonRaphsonSolver name="newton" maxNbIterationsNewton="100" maxNbIterationsLineSearch="1" warnWhenLineSearchFails="false"/>
        <StaticSolver newtonSolver="@newton" name="static"/>
        <SparseLDLSolver template="CompressedRowSparseMatrixd" name="solver"/>

        <Node name="VerticalBeam">
            <RegularGridTopology name="grid" min="-2 2 -2" max="2 42 2" n="4 31 4"/>
            <MechanicalObject template="Vec3d" name="state" position="@grid.position"/>
            <Node name="SpringAttachPoint">
                <MechanicalObject template="Vec3d" name="state" position="2 18 0"/>
                <BarycentricMapping/>
            </Node>
            <Node name="BoundaryCondition">
                <BoxROI name="region" box="-10 1.9 -10 10 2.1 10"/>
                <FixedProjectiveConstraint indices="@region.indices"/>
            </Node>
            <Node name="Forces">
                <HexahedronFEMForceField name="elasticity" youngModulus="640000" poissonRatio="0.45"/>
                <UniformMass template="Vec3d" name="mass" totalMass="600"/>
            </Node>
        </Node>

        <Node name="HorizontalBeam">
            <RegularGridTopology name="grid" min="2 -2 -2" max="42 2 2" n="31 4 4"/>
            <MechanicalObject template="Vec3d" name="state" position="@grid.position"/>
            <Node name="SpringAttachPoint">
                <MechanicalObject template="Vec3d" name="state" position="14 2 0"/>
                <BarycentricMapping/>
            </Node>
            <Node name="TargetPoint">
                <MechanicalObject template="Vec3d" name="state" position="42 0 0"/>
                <BarycentricMapping/>
            </Node>
            <Node name="BoundaryCondition">
                <BoxROI name="region" box="1.9 -10 -10 2.1 10 10"/>
                <FixedProjectiveConstraint indices="@region.indices"/>
            </Node>
            <Node name="Forces">
                <HexahedronFEMForceField name="elasticity" youngModulus="80000" poissonRatio="0.45"/>
                <UniformMass template="Vec3d" name="mass" totalMass="600"/>
            </Node>
        </Node>

        <Node name="Spring">
            <ParameterizedSpringForceField
                    name="force"
                    object1="@../VerticalBeam/SpringAttachPoint" indices1="0"
                    object2="@../HorizontalBeam/SpringAttachPoint" indices2="0"
                    length="@/Parameters/springLength.value"
                    stiffness="@/Parameters/springStiffness.value"
                    damping="0"
            />
        </Node>
    </Node>

    <Node name="Loss">
        <Node name="Target">
            <MechanicalObject template="Vec3d" name="state" position="34.76 22.19 0" showObject="true"/>
        </Node>
        <Node name="Distance">
            <MechanicalObject template="Vec1d" name="output" position="0"/>
            <DistanceFromTargetMapping input="@/Physics/HorizontalBeam/TargetPoint" targetPositions="34.76 22.19 0"/>
            <Node name="Squared">
                <MechanicalObject template="Vec1d" name="output" position="0"/>
                <SquareMapping input="@.."/>
            </Node>
        </Node>
    </Node>
    <!-- lr=100 for stiffness, lr=0.01 for length -->
    <GradientDescentController name="optimizer" loss="@Loss/Distance/Squared/output" trainableParameters="Physics/Spring/force.length" learningRate="0.01"/>
</Node>
