<?xml version="1.0"?>
<Node name="Root" gravity="0 0 0" time="0" animate="0" bbox="-11 -11 -11 11 11 11" dt="0.001">

    <Node name="Plugins">
        <RequiredPlugin name="SofaDiff" pluginName="SofaDiff"/>
        <RequiredPlugin name="Sofa.Component.Visual"/> <!-- Needed to use components [VisualStyle] -->
        <RequiredPlugin name="Sofa.Component.LinearSolver.Iterative"/> <!-- Needed to use components [CGLinearSolver] -->
        <RequiredPlugin name="Sofa.Component.LinearSolver.Direct"/> <!-- Needed to use components [SparseLDLSolver] -->
        <RequiredPlugin name="Sofa.Component.ODESolver.Backward"/> <!-- Needed to use components [NewtonRaphsonSolver, StaticSolver] -->
        <RequiredPlugin name="Sofa.Component.StateContainer"/> <!-- Needed to use components [MechanicalObject] -->
        <RequiredPlugin name="Sofa.Component.Mass"/> <!-- Needed to use components [UniformMass] -->
        <RequiredPlugin name="Sofa.Component.MechanicalLoad"/> <!-- Needed to use components [ConstantForceField] -->
        <RequiredPlugin name="Sofa.Component.Constraint.Projective"/> <!-- Needed to use components [FixedProjectiveConstraint] -->
        <RequiredPlugin name="Sofa.Component.SolidMechanics.Spring"/> <!-- Needed to use components [SpringForceField] -->
        <RequiredPlugin name="Sofa.Component.Mapping.NonLinear"/> <!-- Needed to use components [RigidMapping] -->
    </Node>

    <DefaultAnimationLoop/>
    <VisualStyle displayFlags="showBehavior showBehaviorModels showForceFields showMappings"/>

    <GradientDescentController name="controller" trainableParameters="Objects/springs.length Objects/springs.stiffness" learningRate="0.01"/>

    <Node name="Fixed">
        <MechanicalObject template="Vec3d" name="fixed" position="-10 0 0  10 0 0  0 -10 0  0 10 0  0 0 -10  0 0 10"/>
    </Node>

    <Node name="Objects">
        <NewtonRaphsonSolver name="newton" maxNbIterationsNewton="100" maxNbIterationsLineSearch="1" warnWhenLineSearchFails="false"/>
        <StaticSolver newtonSolver="@newton" name="static"/>
        <!--
        <EulerImplicitSolver name="implicit"/>
        -->

        <!--
        <SparseLDLSolver template="CompressedRowSparseMatrixd"/>
        -->
        <CGLinearSolver template="GraphScattered" name="linear solver" printLog="0" iterations="1000" tolerance="1e-5" threshold="1e-5"/>

        <MechanicalObject template="Rigid3d" name="dofs" position="0 0 0  0 0 0 1"/>
        <UniformMass template="Rigid3d" name="uniformMass" totalMass="1.0"/>

        <Node name="Mapped">
            <MechanicalObject template="Vec3d" name="mapped" position="0 0 0"/>
            <RigidMapping/>
        </Node>

        <SpringForceField name="fixedSprings" object1="@../Fixed" object2="@Mapped" indices1="0 2 4" indices2="0 0 0" length="5 5 5" stiffness="10 10 10" damping="0 0 0"/>
        <ParameterizedSpringForceField name="springs" object1="@../Fixed" object2="@Mapped" indices1="1 3 5" indices2="0 0 0" length="5 5 5" stiffness="3 3 3" damping="0 0 0"/>

        <Node name="Bottom">
            <MechanicalObject template="Vec3d" name="bottom" position="0 -1 0"/>
            <RigidMapping/>
        </Node>
    </Node>

    <Node name="Error">
        <MechanicalObject template="Vec1d" name="error" position="0"/>
        <DistanceToPointCost template="Vec3d" input="@../Objects/Bottom" planeNormal="0.60 2.32 0" planePoint="1 1 1"/>
        <!--
        <DistanceToPlaneCost template="Vec3d" input="@../Objects/Bottom" planeNormal="0.60 2.32 0" planePoint="2.32 -0.60 0.00"/>
        <DistanceToPlaneCost template="Vec3d" input="@../Objects/Bottom" planeNormal="1 0 0" planePoint="1 0 0"/>
        -->
    </Node>
</Node>
