<?xml version="1.0"?>
<Node name="Root" gravity="0 -9.8 0" time="0" animate="0" bbox="-2 -20 -4 42 12 4" dt="0.001">

    <Node name="Plugins">
        <RequiredPlugin name="SofaDiff" pluginName="SofaDiff"/>
        <RequiredPlugin name="Sofa.Component.Visual"/> <!-- Needed to use components [VisualStyle] -->
        <RequiredPlugin name="Sofa.Component.LinearSolver.Iterative"/> <!-- Needed to use components [CGLinearSolver] -->
        <RequiredPlugin name="Sofa.Component.LinearSolver.Direct"/> <!-- Needed to use components [SparseLDLSolver] -->
        <RequiredPlugin name="Sofa.Component.ODESolver.Backward"/> <!-- Needed to use components [NewtonRaphsonSolver, StaticSolver] -->
        <RequiredPlugin name="Sofa.Component.StateContainer"/> <!-- Needed to use components [MechanicalObject] -->
        <RequiredPlugin name="Sofa.Component.Mass"/> <!-- Needed to use components [UniformMass] -->
        <RequiredPlugin name="Sofa.Component.MechanicalLoad"/> <!-- Needed to use components [ConstantForceField] -->
        <RequiredPlugin name="Sofa.Component.Constraint.Projective"/> <!-- Needed to use components [FixedProjectiveConstraint] -->
        <RequiredPlugin name="Sofa.Component.SolidMechanics.Spring"/> <!-- Needed to use components [SpringForceField] -->
        <RequiredPlugin name="Sofa.Component.Topology.Container.Grid"/> <!-- Needed to use components [RegularGridTopology] -->
        <RequiredPlugin name="Sofa.Component.Engine.Select"/> <!-- Needed to use components [BoxROI] -->
        <RequiredPlugin name="Sofa.Component.SolidMechanics.FEM.Elastic"/> <!-- Needed to use components [HexahedronFEMForceField] -->
        <RequiredPlugin name="Sofa.Component.Mapping.Linear"/> <!-- Needed to use components [BarycentricMapping] -->
        <RequiredPlugin name="Sofa.Component.Mapping.NonLinear"/> <!-- Needed to use components [DistanceFromTargetMapping] -->
    </Node>

    <GradientDescentOptimizationLoop name="optimizer" parameters="@/Parameters/springLength @/Parameters/springStiffness"/>
    <DifferentiableAnimationLoop name="simulator" computeBoundingBox="false"/>
    <VisualStyle displayFlags="showBehavior showBehaviorModels showForceFields showMappings"/>

    <Node name="Parameters">
        <TrainableParameterVector name="springLength" value="20" learningRate="0.02"/>
        <TrainableParameterVector name="springStiffness" value="1000" learningRate="200"/>
    </Node>

    <Node name="Physics">
        <NewtonRaphsonSolver name="newton" maxNbIterationsNewton="100" maxNbIterationsLineSearch="1" warnWhenLineSearchFails="false"/>
        <StaticSolver newtonSolver="@newton" name="static"/>
        <SparseLDLSolver template="CompressedRowSparseMatrixd" name="solver"/>
        <StaticAdjointSolver name="adjoint"/>

        <Node name="TopBeam">
            <RegularGridTopology name="grid" min="0 18 -2" max="40 22 2" n="31 4 4"/>
            <MechanicalObject template="Vec3d" name="state" position="@grid.position"/>
            <Node name="SpringAttachPoint">
                <MechanicalObject template="Vec3d" name="state" position="20 18 0"/>
                <BarycentricMapping/>
            </Node>
            <Node name="BoundaryCondition">
                <BoxROI name="left" box="-0.1 18 -2    0.1 22 2"/>
                <FixedProjectiveConstraint indices="@left.indices"/>
                <BoxROI name="right" box="39.9 18 -2   40.1 22 2"/>
                <FixedProjectiveConstraint indices="@right.indices"/>
            </Node>
            <Node name="Forces">
                <HexahedronFEMForceField name="elasticity" youngModulus="50000" poissonRatio="0.45"/>
                <UniformMass template="Vec3d" name="mass" totalMass="600"/>
            </Node>
        </Node>

        <Node name="BottomBeam">
            <RegularGridTopology name="grid" min="0 -2 -2" max="40 2 2" n="31 4 4"/>
            <MechanicalObject template="Vec3d" name="state" position="@grid.position"/>
            <Node name="SpringAttachPoint">
                <MechanicalObject template="Vec3d" name="state" position="20 2 0"/>
                <BarycentricMapping/>
            </Node>
            <Node name="Marker">
                <MechanicalObject template="Vec3d" name="state" position="40 0 0"/>
                <BarycentricMapping/>
            </Node>
            <Node name="BoundaryCondition">
                <BoxROI name="region" box="-0.1 -2 -2   0.1 2 2"/>
                <FixedProjectiveConstraint indices="@region.indices"/>
            </Node>
            <Node name="Forces">
                <HexahedronFEMForceField name="elasticity" youngModulus="50000" poissonRatio="0.45"/>
                <UniformMass template="Vec3d" name="mass" totalMass="600"/>
            </Node>
        </Node>

        <Node name="Spring">
            <ParameterizedSpringForceField
                    name="force"
                    object1="@../TopBeam/SpringAttachPoint" indices1="0"
                    object2="@../BottomBeam/SpringAttachPoint" indices2="0"
                    length="@/Parameters/springLength.value"
                    stiffness="@/Parameters/springStiffness.value"
                    damping="0"
                    drawMode="1"
                    showArrowSize="0.2"
            />
        </Node>
    </Node>

    <Node name="Loss">
        <Node name="Target">
            <MechanicalObject template="Vec3d" name="state" position="40 0 0" showObject="true" drawMode="1" showObjectScale="0.5"/>
        </Node>
        <Node name="Distance">
            <MechanicalObject template="Vec1d" name="output" position="0"/>
            <DistanceFromTargetMapping input="@/Physics/BottomBeam/Marker" targetPositions="@/Loss/Target/state.position"/>
            <Node name="MSE">
                <LossState name="state"/>
                <MeanSquaredErrorMapping/>
            </Node>
        </Node>
    </Node>
</Node>
